// COMSOL Multiphysics 5.4.0.225 model "pressure.mph"
// Outline of the model tree

Parameters
  width = 2
  height = 0.8
  excess = 0.4
  dx = 0.05

Geometry
  geom1 "Geometry 1" (2D, length unit m)
    r1: Rectangle | pos = {-excess, 0}; size = {width+excess*2, height}
    r2: Rectangle | pos = {-excess, 0}; size = {excess, excess}
    sq1: Square | pos = {0*dx, 15*dx}; size = dx
    sq2: Square | pos = {1*dx, 15*dx}; size = dx
    sq3: Square | pos = {2*dx, 15*dx}; size = dx
    sq4: Square | pos = {3*dx, 15*dx}; size = dx
    sq5: Square | pos = {4*dx, 15*dx}; size = dx
    sq6: Square | pos = {5*dx, 15*dx}; size = dx
    sq7: Square | pos = {6*dx, 15*dx}; size = dx
    sq8: Square | pos = {7*dx, 15*dx}; size = dx
    sq9: Square | pos = {8*dx, 15*dx}; size = dx
    sq10: Square | pos = {9*dx, 15*dx}; size = dx
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    dif1: Difference | input = r1; input2 = r2; intbnd = off; edge = all
    fin: Finalize "Form Union"

Materials
  mat1: Common "Material 1" on all domains
    def "Basic"
      density = 1
      dynamicviscosity = 1e-2

Physics
  spf: LaminarFlow on all domains
    dependent variable u = {u, v, w}
    fp1: FluidProperties (default)
    init1: init "Initial Values 1" (default)
    wallbc1: WallBC "Wall 1" (default)
    inl1: InletBoundary "Inlet 1" on boundaries 1
      ComponentWise = VelocityFieldComponentWise
      U0in = 0.01
      u0 = {1, 0, 0}
    out1: OutletBoundary "Outlet 1" on boundaries 1342

Mesh
  mesh1 "Mesh 1"
    size: MeshSizeDefault | table = cfd; hauto = 7
    map1: Map "Mapped 1" on remaining entities
      size1: Size on entire geometry | hmax = dx; hmin = dx; custom = on

Studies
  std1 "Study 1"
    stat: Stationary

Solver configurations
  sol1 "Solution 1" (study std1)
    v1: Variables "Dependent Variables 1"
    s1: Stationary "Stationary Solver 1"
      fc1: FullyCoupled | initstep = 0.01; minstep = 1.0E-6; maxiter = 100
      d1: Direct | linsolver = pardiso; pivotperturb = 1.0E-13

Datasets
  dset1: Solution | solution = sol1

Derived values
  av1: AvLine "Line Average 1" on boundaries 1 | data = dset1

Plots
  pg1: PlotGroup2D "2D Plot Group 1" | data = dset1
    surf1: Surface | expr = spf.U
  pg2: PlotGroup2D "2D Plot Group 2" | data = dset1
    con1: Contour | expr = spf.U