// COMSOL Multiphysics 6.2.0.290 model "fuban_Beam.mph"
// Outline of the model tree

Selections
  sel1: Explicit "显式 1" on no domains

Couplings
  intop1: Integration "积分 1" on all domains

Probes
  dom1: Domain "域探针 1" on all domains | expr = solid.tresca; unit = N/m^2; descr = Tresca 应力; table = tbl3
  dom2: Domain "域探针 2" on all domains | expr = intop1(solid.rho); unit = kg; table = tbl3
  dom3: Domain "域探针 3" on all domains | expr = solid.mises; unit = N/m^2; descr = von Mises 应力; table = tbl3

Geometry
  geom1 "几何 1" (3D, length unit mm)
    wp1: WorkPlane "工作平面 1" | unite = on
      cc1: CompositeCurve "复合曲线 1" | geomattr = {construction, on}; geomattrlevel = 16; type = solid
        pol1: Polygon "多边形 1"
          type = open
          source = table
          table = {{-150, -450}, {0, -450}, {0, 0}, {0, 450}, {-150, 450}}
        ca1: CircularArc "圆弧 1"
          center = {-150, 89}
          rconstr = on
          r = 361
          point1 = {-150, 450}
          point2 = {-430.3657451463111, 316.411628877}
          angle1 = 90
          angle2 = 140.953631902
        ca2: CircularArc "圆弧 2"
          center = {-291.373897779, 203.671884605}
          r = 178.966431415
          point1 = {-430.365745146, 316.411628877}
          point2 = {-464.24, 250}
          angle1 = 140.953631902
          angle2 = 164.997283979
        pol2: Polygon "多边形 2"
          type = open
          source = table
          table = {{-464.24, 250}, {-550, -70}, {-319.99999998, -379.999999985}}
        ca3: CircularArc "圆弧 3"
          center = {-188.6619944260505, -282.555673284}
          r = 163.539195636
          point1 = {-319.99999998, -379.999999985}
          point2 = {-221.3655379892041, -442.7915829533034}
          angle1 = -143.4269690214807
          angle2 = 258.464576942
        ca4: CircularArc "圆弧 4"
          center = {-150, -93.1254412084}
          rconstr = on
          r = 356.874558767
          point1 = {-221.3655379892041, -442.7915829533034}
          point2 = {-150, -449.9999999755602}
          angle1 = -101.535423057
          angle2 = -90
      cc2: CompositeCurve "复合曲线 2" | type = solid
        ca1: CircularArc "圆弧 1"
          center = {-490.0439083876131, 226}
          rconstr = on
          r = 21
          point1 = {-474.4378670525878, 211.948257266}
          point2 = {-490.0439083876131, 205}
          angle1 = -42
          angle2 = -90
          clockwise = on
        pol1: Polygon "多边形 1" | type = open; source = table; table = {{-490.0439083876131, 205}, {-530, 205}}
        ca2: CircularArc "圆弧 2"
          centerconstr = {on, on}
          center = {-530, 169}
          rconstr = on
          r = 36
          point1 = {-530, 205}
          point2 = {-546.3436579906237, 136.923765129}
          angle1 = 90
          angle2 = -117
        pol2: Polygon "多边形 2"
          type = open
          source = table
          table = {{-546.3436579906237, 136.923765129}, {-521.9799482647558, 124.50983498}}
        ca3: CircularArc "圆弧 3"
          center = {-536.9616347561608, 95.1066196816}
          rconstr = on
          r = 33
          point1 = {-521.9799482647558, 124.5098349797941}
          point2 = {-504.3679195165213, 100.268957028}
          angle1 = 63
          angle2 = 9
          clockwise = on
      coi1: Coincident "重合 3" | entity1 = cc2(1) points 1; entity2 = cc1(1) boundaries 7
      hor1: Horizontal "水平 1" | edge = cc2(1) boundaries 2
      coi2: Coincident "重合 4" | entity1 = cc1(1) boundaries 7; entity2 = cc2(1) points 6
      ver1: Vertical "垂直 1a" | edge = cc2(1) boundaries 8
      ang1: Angle "角度 1"
        edge1 = cc2(1) boundaries 8
        reverse1 = on
        edge2 = cc2(1) boundaries 9
        reverse2 = on
        angle = 153
      pos1: Position "位置 1" | vertex = cc1(1) points 5; pos = {-150, 450}
      pos2: Position "位置 2" | vertex = cc1(1) points 4; pos = {0, 450}
      pos3: Position "位置 3" | vertex = cc1(1) points 3
      pos4: Position "位置 4" | vertex = cc1(1) points 2; pos = {0, -450}
      pos5: Position "位置 5" | vertex = cc1(1) points 1; pos = {-150, -450}
      pos6: Position "位置 6" | vertex = cc1(1) points 8; pos = {-550, -70}
      pos7: Position "位置 7" | vertex = cc1(1) points 7; pos = {-464.24, 250}
      tanc1: TangentConstraint "切向约束 1"
        edge1 = cc1(1) boundaries 4
        edge2 = cc1(1) boundaries 5
        point2 = vertex
        vertex2 = cc1(1) points 5
      tanc2: TangentConstraint "切向约束 2"
        edge1 = cc1(1) boundaries 7
        edge2 = cc1(1) boundaries 6
        point2 = vertex
        vertex2 = cc1(1) points 7
      tanc3: TangentConstraint "切向约束 3"
        edge1 = cc1(1) boundaries 6
        edge2 = cc1(1) boundaries 5
        point2 = vertex
        vertex2 = cc1(1) points 6
      tanc4: TangentConstraint "切向约束 4"
        edge1 = cc1(1) boundaries 1
        edge2 = cc1(1) boundaries 10
        point2 = vertex
        vertex2 = cc1(1) points 1
      coi3: Coincident "重合 1" | entity2 = cc1(1) points 1
      pos8: Position "位置 8" | vertex = cc1(1) points 9; pos = {-320, -380}
      tanc5: TangentConstraint "切向约束 5"
        edge1 = cc1(1) boundaries 8
        edge2 = cc1(1) boundaries 9
        point2 = vertex
        vertex2 = cc1(1) points 9
      coi4: Coincident "重合 2" | entity1 = cc1(1) boundaries 17; entity2 = cc1(1) points 13
      coi5: Coincident "重合 5" | entity1 = cc2(1) points 6; entity2 = cc1(1) boundaries 7
      tanc6: TangentConstraint "切向约束 6"
        edge1 = cc2(1) boundaries 1
        edge2 = cc2(1) boundaries 2
        point2 = vertex
        vertex2 = cc2(1) points 2
      coi6: Coincident "重合 6" | entity1 = cc2(1) points 1; entity2 = cc1(1) boundaries 7
      ang2: Angle "角度 2" | edge1 = cc2(1) boundaries 7; edge2 = cc2(1) boundaries 6; angle = 48
      tanc7: TangentConstraint "切向约束 7"
        edge1 = cc2(1) boundaries 4
        point1 = vertex
        vertex1 = cc2(1) points 4
        edge2 = cc2(1) boundaries 3
        point2 = vertex
        vertex2 = cc2(1) points 4
      ang3: Angle "角度 3" | edge1 = cc2(1) boundaries 10; edge2 = cc2(1) boundaries 11; reverse2 = on; angle = 126
      tanc8: TangentConstraint "切向约束 8" | edge1 = cc2(1) boundaries 4; edge2 = cc2(1) boundaries 5
      cc3: CompositeCurve "复合曲线 3" | geomattr = {construction, on}; geomattrlevel = 16
        pol1: Polygon "多边形 1"
          type = open
          source = table
          table = {{-150, -450}, {0, -450}, {0, 0}, {0, 450}, {-150, 450}}
        ca1: CircularArc "圆弧 1"
          center = {-150, 89}
          rconstr = on
          r = 361
          point1 = {-150, 450}
          point2 = {-430.3657451463111, 316.411628877}
          angle1 = 90
          angle2 = 140.953631902
        ca2: CircularArc "圆弧 2"
          center = {-291.373897779, 203.671884605}
          r = 178.966431415
          point1 = {-430.365745146, 316.411628877}
          point2 = {-464.24, 250}
          angle1 = 140.953631902
          angle2 = 164.997283979
        pol2: Polygon "多边形 2"
          type = open
          source = table
          table = {{-464.24, 250}, {-550, -70}, {-319.999999999, -379.9999999993687}}
        ca3: CircularArc "圆弧 3"
          center = {-188.661994426, -282.555673284}
          r = 163.53919566
          point1 = {-319.999999999, -379.9999999993687}
          point2 = {-221.365538003, -442.7915829748291}
          angle1 = -143.4269690214807
          angle2 = 258.4645769391514
        ca4: CircularArc "圆弧 4"
          center = {-150, -93.1254412415}
          rconstr = on
          r = 356.874558758
          point1 = {-221.365538003, -442.7915829748291}
          point2 = {-150, -450}
          angle1 = -101.53542306
          angle2 = -90
      cc4: CompositeCurve "复合曲线 4" | type = solid
        ca1: CircularArc "圆弧 1"
          center = {-548.1827851082977, 48.8378607696}
          rconstr = on
          r = 30.5
          point1 = {-522.6033327859623, 32.2263702016}
          point2 = {-541.841478538356, 19.0043589472}
          angle1 = -33
          angle2 = -78
          clockwise = on
        pol1: Polygon "多边形 1"
          type = open
          source = table
          table = {{-541.841478538356, 19.0043589472}, {-618.4848208694393, 2.71331362642}}
        ca2: CircularArc "圆弧 2"
          centerconstr = {on, on}
          center = {-611, -32.5}
          rconstr = on
          r = 36
          point1 = {-618.4848208694393, 2.71331362642}
          point2 = {-623.9012461836309, -66.1088953539}
          angle1 = 102
          angle2 = 249
        pol2: Polygon "多边形 2"
          type = open
          source = table
          table = {{-623.9012461836309, -66.1088953539}, {-536.8674814424376, -99.5180274718}}
        ca3: CircularArc "圆弧 3"
          center = {-559.8030302133368, -159.267174768}
          rconstr = on
          r = 64
          point1 = {-536.8674814424376, -99.5180274718}
          point2 = {-522.1847740666186, -107.490087128}
          angle1 = 69
          angle2 = 54
          clockwise = on
        pol3: Polygon "多边形 3"
          type = open
          source = table
          table = {{-522.1847740666186, -107.490087128}, {-522.6033327859623, 32.2263702016}}
      ang4: Angle "角度 4"
        edge1 = cc4(1) boundaries 9
        reverse1 = on
        edge2 = cc4(1) boundaries 10
        reverse2 = on
        angle = 147
      pol1: Polygon "多边形 1"
        geomattr = {construction, on}
        geomattrlevel = 16
        type = open
        source = table
        table = {{-611, -32.5}, {-611, 27.5509011994}}
      ang5: Angle "角度 5" | edge1 = cc4(1) boundaries 9; edge2 = pol1(1) boundaries 1; angle = -12
      coi7: Coincident "重合 7" | entity1 = pol1(1) points 1; entity2 = cc4(1) points 8
      ver2: Vertical "垂直 1" | edge = pol1(1) boundaries 1
      pos9: Position "位置 9" | vertex = cc3(1) points 5; pos = {-150, 450}
      pos10: Position "位置 10" | vertex = cc3(1) points 4; pos = {0, 450}
      pos11: Position "位置 11" | vertex = cc3(1) points 3
      pos12: Position "位置 12" | vertex = cc3(1) points 2; pos = {0, -450}
      pos13: Position "位置 13" | vertex = cc3(1) points 1; pos = {-150, -450}
      pos14: Position "位置 14" | vertex = cc3(1) points 8; pos = {-550, -70}
      pos15: Position "位置 15" | vertex = cc3(1) points 7; pos = {-464.24, 250}
      tanc9: TangentConstraint "切向约束 9"
        edge1 = cc3(1) boundaries 4
        edge2 = cc3(1) boundaries 5
        point2 = vertex
        vertex2 = cc3(1) points 5
      tanc10: TangentConstraint "切向约束 10"
        edge1 = cc3(1) boundaries 7
        edge2 = cc3(1) boundaries 6
        point2 = vertex
        vertex2 = cc3(1) points 7
      tanc11: TangentConstraint "切向约束 11"
        edge1 = cc3(1) boundaries 6
        edge2 = cc3(1) boundaries 5
        point2 = vertex
        vertex2 = cc3(1) points 6
      tanc12: TangentConstraint "切向约束 12"
        edge1 = cc3(1) boundaries 1
        edge2 = cc3(1) boundaries 10
        point2 = vertex
        vertex2 = cc3(1) points 1
      pos16: Position "位置 16" | vertex = cc3(1) points 9; pos = {-320, -380}
      tanc13: TangentConstraint "切向约束 13"
        edge1 = cc3(1) boundaries 8
        edge2 = cc3(1) boundaries 9
        point2 = vertex
        vertex2 = cc3(1) points 9
      coi9: Coincident "重合 9" | entity1 = cc3(1) boundaries 17; entity2 = cc3(1) points 13
      tanc14: TangentConstraint "切向约束 14"
        edge1 = cc4(1) boundaries 1
        edge2 = cc4(1) boundaries 2
        point2 = vertex
        vertex2 = cc4(1) points 2
      ang6: Angle "角度 6" | edge1 = cc4(1) boundaries 8; edge2 = cc4(1) boundaries 7; angle = 45
      tanc15: TangentConstraint "切向约束 15"
        edge1 = cc4(1) boundaries 4
        point1 = vertex
        vertex1 = cc4(1) points 4
        edge2 = cc4(1) boundaries 3
        point2 = vertex
        vertex2 = cc4(1) points 4
      ang7: Angle "角度 7" | edge1 = cc4(1) boundaries 11; edge2 = cc4(1) boundaries 12; reverse2 = on; angle = 165
      tanc16: TangentConstraint "切向约束 16" | edge1 = cc4(1) boundaries 4; edge2 = cc4(1) boundaries 5
      c1: Circle "圆 1" | posconstr = {on, on}; pos = {-611, -32.5}; rconstr = on; r = 16
      del1: Delete "删除实体 1" | input = cc4(1) boundaries 3
      tanc17: TangentConstraint "切向约束 17"
        edge1 = del1(1) boundaries 2
        point1 = vertex
        vertex1 = del1(1) points 2
        edge2 = del1(1) boundaries 3
        point2 = vertex
        vertex2 = del1(1) points 2
      coi10: Coincident "重合 10" | entity1 = del1(1) points 5; entity2 = cc3(1) boundaries 7
      ls1: LineSegment "线段 1" | vertex1 = cc3(1) points 8; vertex2 = cc3(1) points 10
      ls2: LineSegment "线段 2" | vertex1 = ls1(1) points 2; vertex2 = cc3(1) points 7
      ca1: CircularArc "圆弧 1"
        center = {-150, 89}
        r = 361
        point1 = {-150, 450}
        point2 = {-430.3657451463111, 316.411628877}
        angle1 = 90
        angle2 = 140.953631902
      coi11: Coincident "重合 11" | entity1 = ca1(1) points 1; entity2 = ls2(1) points 2
      coi12: Coincident "重合 12" | entity1 = cc3(1) points 6; entity2 = ca1(1) points 2
      con1: Concentric "同心 1" | edge = cc3(1) boundaries 5; ca1(1) boundaries 1
      ca2: CircularArc "圆弧 2"
        center = {-291.373897779, 203.671884605}
        r = 178.966431415
        point1 = {-430.365745146, 316.4116288771394}
        point2 = {-464.24, 250}
        angle1 = 140.953631902
        angle2 = 164.997283979
      coi13: Coincident "重合 13" | entity1 = ca2(1) points 1; entity2 = ca1(1) points 2
      coi14: Coincident "重合 14" | entity1 = ca2(1) points 2; entity2 = cc3(1) points 7
      pt1: Point "点 1" | p = {-622.3137084989847, -43.813708499}
      ls7: LineSegment "线段 7"
        geomattr = {construction, on}
        geomattrlevel = 16
        vertex1 = pol1(1) points 1
        vertex2 = c1(1) points 3
      con2: Concentric | edge = cc3(1) boundaries 6; ca2(1) boundaries 1
      ls3: LineSegment "线段 3" | vertex1 = ca2(1) points 2; vertex2 = cc2(1) points 6
      ls4: LineSegment "线段 4" | vertex1 = cc2(1) points 4; vertex2 = del1(1) points 5
      ls5: LineSegment "线段 5" | vertex1 = del1(1) points 6; vertex2 = cc3(1) points 4
      ls6: LineSegment "线段 6" | vertex1 = ls1(1) points 1; vertex2 = cc3(1) points 6
      ca4: CircularArc "圆弧 4"
        center = {-150, -93.1254412415}
        r = 356.874558758
        point1 = {-221.365537991, -442.7915829771176}
        point2 = {-150, -450}
        angle1 = -101.535423058
        angle2 = -90
      coi15: Coincident "重合 15" | entity1 = ca4(1) points 3; entity2 = cc3(1) points 14
      coi16: Coincident "重合 16" | entity1 = ls6(1) points 2; entity2 = ca4(1) points 2
      coi17: Coincident "重合 17" | entity1 = cc3(1) points 10; entity2 = ca4(1) points 1
      coi18: Coincident "重合 18" | entity1 = del1(1) points 6; entity2 = cc3(1) boundaries 8
      ca5: CircularArc "圆弧 5"
        center = {-188.6619944303285, -282.5556732870179}
        r = 163.539195655
        point1 = {-320, -380}
        point2 = {-221.365538006, -442.791582974}
        angle1 = -143.4269690214807
        angle2 = -101.535423061
      coi20: Coincident "重合 20" | entity1 = ca5(1) points 1; entity2 = cc3(1) boundaries 15
      coi21: Coincident "重合 21" | entity1 = ca5(1) points 1; entity2 = ls5(1) points 2
      coi22: Coincident "重合 22" | entity1 = ca5(1) points 3; entity2 = cc3(1) points 13
      c2: Circle "圆 2" | posconstr = {on, on}; pos = {-530, 169}; rconstr = on; r = 16
      csol1: ConvertToSolid "转换为实体 1" | input = ca1, ca2, ca4, ca5, cc2, del1, ls1, ls2, ls3, ls4, ls5, ls6
      dif1: Difference "差集 1" | input = csol1; input2 = c1, c2
      ls8: LineSegment "线段 8"
        geomattr = {construction, on}
        geomattrlevel = 16
        vertex1 = ls7(1) points 1
        vertex2 = pt1(1) points 1
      pt2: Point "点 2" | p = {-622.3137084989846, -21.186291501}
      ls9: LineSegment "线段 9"
        geomattr = {construction, on}
        geomattrlevel = 16
        vertex1 = ls8(1) points 1
        vertex2 = pt2(1) points 1
      ang8: Angle "角度 8" | edge1 = ls8(1) boundaries 1; reverse1 = on; edge2 = ls7(1) boundaries 1; angle = -45
      coi23: Coincident "重合 23" | entity1 = pt1(1) points 1; entity2 = dif1(1) boundaries 14
      coi24: Coincident "重合 24" | entity1 = dif1(1) boundaries 13; entity2 = pt2(1) points 1
      ang10: Angle "角度 10" | edge1 = ls7(1) boundaries 1; reverse1 = on; edge2 = ls9(1) boundaries 1; angle = -45
      pt3: Point "点 3"
      pt4: Point "点 4" | pconstr = {on, on}; p = {-530, 169}
      ls10: LineSegment "线段 10"
        geomattr = {construction, on}
        geomattrlevel = 16
        vertex1 = pt4(1) points 1
        vertex2 = dif1(1) points 17
      pt5: Point "点 5" | p = {-518.6862915010151, 180.313708499}
      pt6: Point "点 6" | p = {-518.6862915010153, 157.686291501}
      coi25: Coincident "重合 25" | entity1 = pt5(1) points 1; entity2 = dif1(1) boundaries 18
      coi26: Coincident "重合 26" | entity1 = dif1(1) boundaries 17; entity2 = pt6(1) points 1
      ls11: LineSegment "线段 11"
        geomattr = {construction, on}
        geomattrlevel = 16
        vertex1 = ls10(1) points 1
        vertex2 = pt5(1) points 1
      ls12: LineSegment "线段 12"
        geomattr = {construction, on}
        geomattrlevel = 16
        vertex1 = ls11(1) points 1
        vertex2 = pt6(1) points 1
      ang11: Angle "角度 11" | edge1 = ls11(1) boundaries 1; edge2 = ls10(1) boundaries 1; angle = -45
      ang12: Angle "角度 12" | edge1 = ls12(1) boundaries 1; edge2 = ls10(1) boundaries 1; angle = 45
    ext1: Extrude "拉伸 1" | workplane = wp1; input = wp1; distance = 60
    wp3: WorkPlane "工作平面 3" | unite = on
      cc1: CompositeCurve "复合曲线 1" | geomattr = {construction, on}; geomattrlevel = 16; type = solid
        pol1: Polygon "多边形 1"
          type = open
          source = table
          table = {{-150, -450}, {0, -450}, {0, 0}, {0, 450}, {-150, 450}}
        ca1: CircularArc "圆弧 1"
          center = {-150, 89}
          rconstr = on
          r = 361
          point1 = {-150, 450}
          point2 = {-430.3657451463111, 316.411628877}
          angle1 = 90
          angle2 = 140.953631902
        ca2: CircularArc "圆弧 2"
          center = {-291.373897779, 203.671884605}
          r = 178.966431415
          point1 = {-430.365745146, 316.411628877}
          point2 = {-464.24, 250}
          angle1 = 140.953631902
          angle2 = 164.997283979
        pol2: Polygon "多边形 2"
          type = open
          source = table
          table = {{-464.24, 250}, {-550, -70}, {-320.0000000228956, -380.0000000169871}}
        ca3: CircularArc "圆弧 3"
          center = {-188.6619944260505, -282.555673284}
          r = 163.5391956890839
          point1 = {-320.0000000228956, -380.0000000169871}
          point2 = {-221.365538006, -442.791583004}
          angle1 = -143.4269690214807
          angle2 = 258.46457694
        ca4: CircularArc "圆弧 4"
          center = {-150, -93.1254412316}
          rconstr = on
          r = 356.874558798
          point1 = {-221.365538006, -442.79158300433}
          point2 = {-150, -450.0000000293679}
          angle1 = -101.535423059
          angle2 = -90
      off1: Offset "偏移 1"
        geomattr = {construction, off}
        geomattrlevel = 16
        input = cc1(1) boundaries 1-4, 7-10
        distance = 5
        reverse = on
      ls1: LineSegment "线段 1" | vertex1 = off1(1) points 7; vertex2 = off1(1) points 5
      csol1: ConvertToSolid "转换为实体 1" | input = ls1, off1
    ext4: Extrude "拉伸 4" | workplane = wp3; input = wp3; distance = 25
    wp5: WorkPlane "工作平面 5" | quickz = 35; unite = on
      cc1: CompositeCurve "复合曲线 1" | geomattr = {construction, on}; geomattrlevel = 16; type = solid
        pol1: Polygon "多边形 1"
          type = open
          source = table
          table = {{-150, -450}, {0, -450}, {0, 0}, {0, 450}, {-150, 450}}
        ca1: CircularArc "圆弧 1"
          center = {-150, 89}
          rconstr = on
          r = 361
          point1 = {-150, 450}
          point2 = {-430.3657451463111, 316.411628877}
          angle1 = 90
          angle2 = 140.953631902
        ca2: CircularArc "圆弧 2"
          center = {-291.373897779, 203.671884605}
          r = 178.966431415
          point1 = {-430.365745146, 316.411628877}
          point2 = {-464.24, 250}
          angle1 = 140.953631902
          angle2 = 164.997283979
        pol2: Polygon "多边形 2"
          type = open
          source = table
          table = {{-464.24, 250}, {-550, -70}, {-320.0000000228956, -380.0000000169871}}
        ca3: CircularArc "圆弧 3"
          center = {-188.6619944260505, -282.555673284}
          r = 163.5391956890839
          point1 = {-320.0000000228956, -380.0000000169871}
          point2 = {-221.365538006, -442.791583004}
          angle1 = -143.4269690214807
          angle2 = 258.46457694
        ca4: CircularArc "圆弧 4"
          center = {-150, -93.1254412316}
          rconstr = on
          r = 356.874558798
          point1 = {-221.365538006, -442.79158300433}
          point2 = {-150, -450.0000000293679}
          angle1 = -101.535423059
          angle2 = -90
      off1: Offset "偏移 1"
        geomattr = {construction, off}
        geomattrlevel = 16
        input = cc1(1) boundaries 1-4, 7-10
        distance = 5
        reverse = on
      ls1: LineSegment "线段 1" | vertex1 = off1(1) points 7; vertex2 = off1(1) points 5
      csol1: ConvertToSolid "转换为实体 1" | input = ls1, off1
    ext5: Extrude "拉伸 5" | workplane = wp5; input = wp5; distance = 25
    dif3: Difference "差集 3" | input = ext1; input2 = ext4, ext5
    wp4: WorkPlane "工作平面 4" | quickz = 25; unite = on
      cc1: CompositeCurve "复合曲线 1" | geomattr = {construction, on}; geomattrlevel = 16; type = solid
        pol1: Polygon "多边形 1"
          type = open
          source = table
          table = {{-150, -450}, {0, -450}, {0, 0}, {0, 450}, {-150, 450}}
        ca1: CircularArc "圆弧 1"
          center = {-150, 89}
          rconstr = on
          r = 361
          point1 = {-150, 450}
          point2 = {-430.3657451463111, 316.411628877}
          angle1 = 90
          angle2 = 140.953631902
        ca2: CircularArc "圆弧 2"
          center = {-291.373897779, 203.671884605}
          r = 178.966431415
          point1 = {-430.365745146, 316.411628877}
          point2 = {-464.24, 250}
          angle1 = 140.953631902
          angle2 = 164.997283979
        pol2: Polygon "多边形 2"
          type = open
          source = table
          table = {{-464.24, 250}, {-550, -70}, {-320.000385717, -380.000286177}}
        ca3: CircularArc "圆弧 3"
          center = {-188.662009829, -282.555684712}
          r = 163.5396567673445
          point1 = {-320.000385717, -380.000286177}
          point2 = {-221.365696438, -442.792035824}
          angle1 = -143.4269690214807
          angle2 = 258.4645587662058
        ca4: CircularArc "圆弧 4"
          center = {-150, -93.1256838792}
          rconstr = on
          r = 356.874796407
          point1 = {-221.365696438, -442.792035824}
          point2 = {-150, -450.000480286}
          angle1 = -101.535441234
          angle2 = -90
      pos1: Position "位置 1" | vertex = cc1(1) points 5; pos = {-150, 450}
      pos2: Position "位置 2" | vertex = cc1(1) points 4; pos = {0, 450}
      pos3: Position "位置 3" | vertex = cc1(1) points 3
      pos4: Position "位置 4" | vertex = cc1(1) points 2; pos = {0, -450}
      pos5: Position "位置 5" | vertex = cc1(1) points 1; pos = {-150, -450}
      pos6: Position "位置 6" | vertex = cc1(1) points 8; pos = {-550, -70}
      pos7: Position "位置 7" | vertex = cc1(1) points 7; pos = {-464.24, 250}
      tanc1: TangentConstraint "切向约束 1"
        edge1 = cc1(1) boundaries 4
        edge2 = cc1(1) boundaries 5
        point2 = vertex
        vertex2 = cc1(1) points 5
      tanc2: TangentConstraint "切向约束 2"
        edge1 = cc1(1) boundaries 7
        edge2 = cc1(1) boundaries 6
        point2 = vertex
        vertex2 = cc1(1) points 7
      tanc3: TangentConstraint "切向约束 3"
        edge1 = cc1(1) boundaries 6
        edge2 = cc1(1) boundaries 5
        point2 = vertex
        vertex2 = cc1(1) points 6
      tanc4: TangentConstraint "切向约束 4"
        edge1 = cc1(1) boundaries 1
        edge2 = cc1(1) boundaries 10
        point2 = vertex
        vertex2 = cc1(1) points 1
      coi1: Coincident "重合 1" | entity1 = cc1(1) points 11; entity2 = cc1(1) points 1
      pos8: Position "位置 8" | vertex = cc1(1) points 9; pos = {-320, -380}
      tanc5: TangentConstraint "切向约束 5"
        edge1 = cc1(1) boundaries 8
        edge2 = cc1(1) boundaries 9
        point2 = vertex
        vertex2 = cc1(1) points 9
      coi2: Coincident "重合 2" | entity1 = cc1(1) boundaries 17; entity2 = cc1(1) points 14
      off1: Offset "偏移 1"
        geomattr = {construction, off}
        geomattrlevel = 16
        input = cc1(1) boundaries 1-4, 7-10
        distance = 2
      ls1: LineSegment "线段 1" | vertex1 = off1(1) points 5; vertex2 = off1(1) points 7
      csol1: ConvertToSolid "转换为实体 1" | input = ls1, off1
      r1: Rectangle "矩形 1" | rot = 10; base = center; size = {30, 4000}
      r2: Rectangle "矩形 2" | rot = 20; base = center; size = {30, 4000}
      r3: Rectangle "矩形 3" | rot = 30; base = center; size = {30, 4000}
      r4: Rectangle "矩形 4" | rot = 40; base = center; size = {30, 4000}
      r5: Rectangle "矩形 5" | rot = 50; base = center; size = {30, 4000}
      r6: Rectangle "矩形 6" | rot = 60; base = center; size = {30, 4000}
      uni1: Union "并集 1" | input = r1, r2, r3, r4, r5, r6; intbnd = off; edge = all
      int1: Intersection "交集 1" | input = csol1, uni1
    ext3: Extrude "拉伸 3" | workplane = wp4; input = wp4; distance = 10
    wp6: WorkPlane "工作平面 6" | quickz = 25; unite = on
      cc1: CompositeCurve "复合曲线 1" | geomattr = {construction, on}; geomattrlevel = 16; type = solid
        pol1: Polygon "多边形 1"
          type = open
          source = table
          table = {{-150, -450}, {0, -450}, {0, 0}, {0, 450}, {-150, 450}}
        ca1: CircularArc "圆弧 1"
          center = {-150, 89}
          rconstr = on
          r = 361
          point1 = {-150, 450}
          point2 = {-430.3657451463111, 316.411628877}
          angle1 = 90
          angle2 = 140.953631902
        ca2: CircularArc "圆弧 2"
          center = {-291.373897779, 203.671884605}
          r = 178.966431415
          point1 = {-430.365745146, 316.411628877}
          point2 = {-464.24, 250}
          angle1 = 140.953631902
          angle2 = 164.997283979
        pol2: Polygon "多边形 2"
          type = open
          source = table
          table = {{-464.24, 250}, {-550, -70}, {-320.0000000228956, -380.0000000169871}}
        ca3: CircularArc "圆弧 3"
          center = {-188.6619944260505, -282.555673284}
          r = 163.5391956890839
          point1 = {-320.0000000228956, -380.0000000169871}
          point2 = {-221.365538006, -442.791583004}
          angle1 = -143.4269690214807
          angle2 = 258.46457694
        ca4: CircularArc "圆弧 4"
          center = {-150, -93.1254412316}
          rconstr = on
          r = 356.874558798
          point1 = {-221.365538006, -442.79158300433}
          point2 = {-150, -450.0000000293679}
          angle1 = -101.535423059
          angle2 = -90
      off1: Offset "偏移 1"
        geomattr = {construction, off}
        geomattrlevel = 16
        input = cc1(1) boundaries 1-4, 7-10
        distance = 5
        reverse = on
      ls1: LineSegment "线段 1" | vertex1 = off1(1) points 7; vertex2 = off1(1) points 5
      csol1: ConvertToSolid "转换为实体 1" | input = ls1, off1
    ext6: Extrude "拉伸 6" | workplane = wp6; input = wp6; distance = 10
    dif4: Difference "差集 4" | input = dif3; input2 = ext6
    uni1: Union "并集 1" | input = dif4, ext3
    mir1: Mirror "镜像 1" | input = uni1; keep = on; axis = {1, 0, 0}
    uni2: Union "并集 2" | input = uni1, mir1; intbnd = off; face = all
    fin: Finalize "形成联合体"

Materials
  mat1: Common "1050 [solid,annealed]" on domains 1
    def "基本"
      thermalconductivity = k_solid_annealed_1(T)
      resistivity = res_solid_1(T)
      thermalexpansioncoefficient = (alpha_solid_1(T)+(Tempref-293[K])*if(abs(T-Tempref)>1e-3,(alpha_solid_1(T)-alpha_solid_1(Tempref))/(T-Tempref),d(alpha_solid_1(T),T)))/(1+alpha_solid_1(Tempref)*(Tempref-293[K]))
      heatcapacity = C_solid_1(T)
      electricconductivity = sigma_solid_1(T)
      VP = VP_solid_1(T)
      emissivity = epsilon(T)
      density = rho_solid_1(T)
      TD = TD(T)
      k_solid_annealed_1: Piecewise | arg = T; pieces = {293.0, 933.16, 39.64599+1.684012*T^1-0.005413421*T^2+8.431302E-6*T^3-6.537049E-9*T^4+2.002031E-12*T^5}; argunit = K; fununit = W/(m*K)
      res_solid_1: Piecewise
        arg = T
        pieces = 
          {1.0, 20.0, 1.091612E-12-1.10726E-13*T^1+3.696901E-14*T^2-2.781934E-15*T^3+1.008733E-16*T^4}
          {20.0, 50.0, -3.3120008E-11+7.29041E-12*T^1-4.771551E-13*T^2+1.071535E-14*T^3}
          {50.0, 200.0, 1.09659242E-10-3.988929E-11*T^1+1.061978E-12*T^2-2.337666E-15*T^3}
          {200.0, 933.16, -1.03669883E-8+1.451201E-10*T^1-8.192563E-14*T^2+6.619834E-17*T^3}
        argunit = K
        fununit = ohm*m
      alpha_solid_1: Piecewise
        arg = T
        pieces = 
          {10.0, 137.0, 1.43109188E-5+3.37038626E-8*T^1+8.16435956E-10*T^2-1.08888719E-11*T^3+5.23223423E-14*T^4-8.82682652E-17*T^5}
          {137.0, 247.0, 2.07834478E-5-4.08338871E-8*T^1+2.32930107E-10*T^2+1.49187457E-12*T^3-1.07271913E-14*T^4+1.67112321E-17*T^5}
          {247.0, 933.16, 7.73307064E-6+1.51327401E-7*T^1-5.79889205E-10*T^2+1.08298998E-12*T^3-9.44189288E-16*T^4+3.12958753E-19*T^5}
        argunit = K
        fununit = 1/K
      C_solid_1: Piecewise
        arg = T
        pieces = 
          {10.0, 26.0, 10.0147917-3.90760773*T^1+0.648758442*T^2-0.0548161053*T^3+0.00262892806*T^4-6.45484119E-5*T^5+6.54234808E-7*T^6}
          {26.0, 108.0, -71.838152+9.71552515*T^1-0.55581666*T^2+0.0172355785*T^3-2.25678347E-4*T^4+1.36370432E-6*T^5-3.14875506E-9*T^6}
          {108.0, 300.0, -892.25551+28.0210131*T^1-0.219689057*T^2+0.00103357024*T^3-2.84563726E-6*T^4+4.15606786E-9*T^5-2.45888664E-12*T^6}
          {300.0, 933.16, 663.125754+1.17769949*T^1-0.00154549231*T^2+1.04234523E-6*T^3}
        argunit = K
        fununit = J/(kg*K)
      sigma_solid_1: Piecewise
        arg = T
        pieces = 
          {1.0, 20.0, 1/(1.00873300E-16*T^4-2.78193400E-15*T^3+3.69690100E-14*T^2-1.10726000E-13*T+1.09161200E-12)}
          {20.0, 50.0, 1/(1.07153500E-14*T^3-4.77155100E-13*T^2+7.29041000E-12*T-3.31200080E-11)}
          {50.0, 200.0, 1/(-2.33766600E-15*T^3+1.06197800E-12*T^2-3.98892900E-11*T+1.09659242E-10)}
          {200.0, 933.16, 1/(6.61983400E-17*T^3-8.19256300E-14*T^2+1.45120100E-10*T-1.03669883E-08)}
        argunit = K
        fununit = S/m
      VP_solid_1: Piecewise | arg = T; pieces = {293.0, 933.16, (exp((-1.73420000e+04/T-7.92700000e-01*log10(T)+1.23398100e+01)*log(10.0)))*1.33320000e+02}; argunit = K; fununit = Pa
      epsilon: Piecewise | arg = T; pieces = {175.0, 700.0, -0.006159012+1.209023E-4*T^1-1.728543E-7*T^2+1.274369E-10*T^3}; argunit = K
      rho_solid_1: Piecewise
        arg = T
        pieces = 
          {10.0, 247.0, 2734.57514-0.0398881851*T^1+0.00187559788*T^2-3.69839365E-5*T^3+2.55112441E-7*T^4-8.1685655E-10*T^5+1.00385922E-12*T^6}
          {247.0, 933.16, 2751.77566-0.179058415*T^1+4.65832302E-5*T^2-1.51653304E-7*T^3+6.83086165E-11*T^4+8.71886752E-16*T^5-2.11179857E-18*T^6}
        argunit = K
        fununit = kg/m^3
      TD: Piecewise
        arg = T
        pieces = 
          {20.0, 74.0, exp(-5807.88202+9180.60153*log(T)^1-6008.76256*log(T)^2+2086.0455*log(T)^3-405.314165*log(T)^4+41.7772226*log(T)^5-1.78390161*log(T)^6)}
          {74.0, 329.0, exp(-6160.54247+7781.80151*log(T)^1-4051.85204*log(T)^2+1114.52801*log(T)^3-171.115377*log(T)^4+13.9200755*log(T)^5-0.469134794*log(T)^6)}
          {329.0, 933.16, exp(63264.9872-60576.1854*log(T)^1+24137.9525*log(T)^2-5124.1508*log(T)^3+611.192838*log(T)^4-38.8356702*log(T)^5+1.02695017*log(T)^6)}
        argunit = K
        fununit = m^2/s
    ThermalExpansion "热膨胀"
      alphatan = CTE_solid_1(T)
      dL = (dL_solid_1(T)-dL_solid_1(Tempref))/(1+dL_solid_1(Tempref))
      dL_solid_1: Piecewise
        arg = T
        pieces = 
          {10.0, 25.0, -0.00416732581-3.26820168E-13*T^1-6.40537926E-9*T^2+7.35005611E-10*T^3-3.34650303E-11*T^4+1.0196671E-12*T^5-9.00232037E-15*T^6}
          {25.0, 189.0, -0.00424379768+7.68932463E-6*T^1-2.86497054E-7*T^2+4.90825879E-9*T^3-3.08623048E-11*T^4+8.74528953E-14*T^5-8.97335932E-17*T^6}
          {189.0, 933.16, -0.00226518274-3.66079307E-5*T^1+3.21234948E-7*T^2-8.97205299E-10*T^3+1.35963749E-12*T^4-1.03588624E-15*T^5+3.12958765E-19*T^6}
        argunit = K
      CTE_solid_1: Piecewise
        arg = T
        pieces = 
          {10.0, 27.0, 3.26614079E-8-1.2811084E-8*T^1+2.2050497E-9*T^2-1.3386148E-10*T^3+5.0983621E-12*T^4-5.4014065E-14*T^5}
          {27.0, 79.0, -3.29120927E-6+3.06868839E-7*T^1-1.00481619E-8*T^2+1.72476772E-10*T^3-8.8460608E-13*T^4}
          {79.0, 230.0, -2.28632108E-5+6.67491471E-7*T^1-4.40262199E-9*T^2+1.45535841E-11*T^3-1.91062188E-14*T^4}
          {230.0, 900.0, 1.24556905E-5+5.05077193E-8*T^1-5.80655625E-11*T^2+3.01430546E-14*T^3}
        argunit = K
        fununit = 1/K
    Enu "杨氏模量和泊松比"
      E = E(T)
      nu = nu(T)
      E: Piecewise
        arg = T
        pieces = 
          {0.0, 375.0, 7.78113242E10-3902619.33*T^1-117581.177*T^2+141.634248*T^3}
          {375.0, 773.16, 7.770329E10+2036488.3*T^1-189160.72*T^2+425.29312*T^3-0.35457359*T^4}
        argunit = K
        fununit = Pa
      nu: Piecewise | arg = T; pieces = {0.0, 773.16, 0.3238668+3.754548E-6*T^1+2.213647E-7*T^2-6.565023E-10*T^3+4.21277E-13*T^4+3.170505E-16*T^5}; argunit = K
    KG "体积模量和剪切模量"
      K = kappa(T)
      G = mu(T)
      mu: Piecewise | arg = T; pieces = {0.0, 773.16, 2.93406033E10+1144443.75*T^1-82232.7813*T^2+203.980815*T^3-0.19989072*T^4+3.26105687E-5*T^5}; argunit = K; fununit = Pa
      kappa: Piecewise | arg = T; pieces = {0.0, 773.16, 7.35752E10+1900026.0*T^1-72136.97*T^2+53.47482*T^3}; argunit = K; fununit = Pa

Physics
  solid: SolidMechanics "固体力学" on all domains
    dependent variable u = {u, v, w}
    lemm1: LinearElasticModel "线弹性材料 1" (default)
    free1: Free "自由 1" (default)
    init1: init "初始值 1" (default)
    bndl1: BoundaryLoad "边界载荷 1" on boundaries 1, 2
      LoadType = TotalForce
      Ftot = {-10000, 0, 0}
      FperArea = {-10000, 0, 0}
    bndl2: BoundaryLoad "边界载荷 2" on boundaries 30, 31
      LoadType = TotalForce
      Ftot = {10000, 0, 0}
      FperArea = {10000, 0, 0}
    bndl3: BoundaryLoad "边界载荷 3" on boundaries 134, 135
      LoadType = TotalForce
      Ftot = {-10000, 0, 0}
      FperArea = {-10000, 0, 0}
    bndl4: BoundaryLoad "边界载荷 4" on boundaries 151, 152
      LoadType = TotalForce
      Ftot = {10000, 0, 0}
      FperArea = {10000, 0, 0}
    disp1: Displacement1 "指定位移 1" on edges 242 | Direction = {prescribed, free, free}
    disp2: Displacement1 "指定位移 2" on edges 213 | Direction = {prescribed, prescribed, prescribed}

Mesh
  mesh1 "网格 1"
    size: MeshSizeDefault "大小" | hauto = 3
    ftet1: FreeTet "自由四面体网格 1" on remaining entities | optcurved = on
    size1: Size "大小 1" on edges 2, 3, 12, 15, 55, 59, 74, 77, 379, 380, 384, 387, 425, 428, 434, 437 | hauto = 2

Studies
  std1 "研究 1"
    stat: Stationary "稳态"

Solver configurations
  sol1 "解 1" (study std1)
    v1: Variables "因变量 1"
    s1: Stationary "稳态求解器 1"
      fc1: FullyCoupled "全耦合 1" | linsolver = d1
      d1: Direct "建议的直接求解器 (solid)" | linsolver = pardiso; pivotperturb = 1.0E-9

Datasets
  dset1: Solution | solution = sol1
  dset2: Solution "探针解 2" | solution = sol1
  avh1: Average "域探针 1" on domains 1 | data = dset2
  avh2: Average "域探针 2" on domains 1 | data = dset2
  avh3: Average "域探针 3" on domains 1 | data = dset2

Derived values
  av1: AvSurface "表面平均值 1" on boundaries 1, 2, 151, 152 | data = dset1; table = tbl1; expr = solid.disp
  av2: AvSurface "表面平均值 2" on boundaries 30, 31, 134, 135 | data = dset1; table = tbl2; expr = solid.disp
  pev1: EvalPoint "域探针 1" | data = avh1; table = tbl3; expr = solid.tresca
  pev2: EvalPoint "域探针 2" | data = avh2; table = tbl3; expr = intop1(solid.rho)
  pev3: EvalPoint "域探针 3" | data = avh3; table = tbl3; expr = solid.mises

Tables
  tbl1: Table "表格 1"
    // 表面平均值 1
    位移大小 (mm) | 位移大小 (mm) | 位移大小 (mm) | 位移大小 (mm) | 位移大小 (mm)
    0.00835762 | 0.00632485 | 0.0103904 | 0.00835762 | 0.0103904
  tbl2: Table "表格 2"
    // 表面平均值 2
    位移大小 (mm)
    0.00632485
  tbl3: Table "探针表 3"
    Tresca 应力 (N/m^2), 域探针 1 | 积分 1 (kg), 域探针 2 | von Mises 应力 (N/m^2), 域探针 3
    7.74724e+07 | 11.0512 | 7.4175e+07

Plots
  pg1: PlotGroup3D "应力 (solid)" | data = dset1
    vol1: Volume "体 1" | data = dset1; expr = solid.misesGp; descr = von Mises 应力
  pg2: PlotGroup3D "三维绘图组 2" | data = dset1
  pg3: PlotGroup1D "探针绘图组 3"
    tblp1: Table "探针表图 1" | table = tbl3
  pg4: PlotGroup3D "位移" | data = dset1
    vol1: Volume "体 1" | expr = solid.disp